m := 10000
p := 10
A := 500
i := 0 .. m
B := 250
x[i] := A*i/m
j := 1 .. m
Time := 14.702
Time := 11.623
Time := 12.808
Time := 13.12
Time := 20.238
y[i] := B*(1 - x[i]/(A - sin(A)/2)) + sin(x[i])
y[i] := B*(1 - x[i]/A)
y[i] := (B*(1 - x[i]/(A - 2*cos(A))) + cos(x[i])) - 1
y[i] := B/A^6*(x[i] - A)^6
y[i] := B*(1 - x[i]/(A + cos(A))) - cos((2*x)[i]) + 1
Time := 31.714
y[i] := (-B/A)*sqrt(-x[i]^2 + 2*x[i]*A) + B
y[i] := -B/A^6*x[i]^6 + B
..........................................................................................................................................................................................................................................................................................................................................................................................................
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f[j] := (y[j] - y[j - 1])/(x[j] - x[j - 1])
f[0] := f[1]
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α[j] := atan(f[j])
α[0] := α[1]
α[2]*4/π = 0
ax[j] := -p*sin(α)[j]*cos(α[j])
ay[j] := -p*sin(α[j])^2
a[j] := sqrt(ax[j]^2 + ay[j]^2)
vx[j] := sum(ax[i]/m, i = 1 .. j)
vy[j] := sum(ay[i]/m, i = 1 .. j)
v[j] := sqrt(vx[j]^2 + vy[j]^2)
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s[j] := sqrt((y[j] - y[j - 1])^2 + (x[j] - x[j - 1])^2)
t[j] := (-v[j] + sqrt(v[j]^2 + 2*a[j]*s[j]))/a[j]
t[0] := t[1]
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t = [
    0; 0; 0; 0; 0; 0; 0; 0; 0; 0
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]
T[j] := sum(t[i], i = 1 .. j)
T = [
    0; 0; 0; 0; 0; 0; 0; 0; 0; 0
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]
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T[m] = 3144823
a = [
    0; 0; 0; 0; 0; 0; 0; 0; 0; 0
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]
s = [
    0; 0.05; 0.05; 0.05; 0.05; 0.05; 0.05; 0.05; 0.05; 0.05
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]
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