m := 1000
p := 10
A := 200
i := 0 .. m
B := 600
x[i] := A*i/m
j := 1 .. m
Time := 12.808
Time := 20.238
Time := 14.702
Time := 11.623
Time := 13.12
y[i] := (B*(1 - x[i]/(A - 2*cos(A))) + cos(x[i])) - 1
y[i] := B*(1 - x[i]/(A - sin(A)/2)) + sin(x[i])
y[i] := B*(1 - x[i]/A)
y[i] := B/A^2*(x[i] - A)^2
Time := 31.714
y[i] := B*(1 - x[i]/(A + cos(A))) - cos((2*x)[i]) + 1
y[i] := -B/A^2*x[i]^2 + B
y[i] := (-B/A)*sqrt(-x[i]^2 + 2*x[i]*A) + B
..........................................................................................................................................................................................................................................................................................................................................................................................................
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f[j] := (y[j] - y[j - 1])/(x[j] - x[j - 1])
f[0] := f[1]
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α[j] := atan(f[j])
α[0] := α[1]
α[2]*4/π = -1.97707
ax[j] := -p*sin(α)[j]*cos(α[j])
ay[j] := -p*sin(α[j])^2
s[j] := sqrt((y[j] - y[j - 1])^2 + (x[j] - x[j - 1])^2)
a[j] := sqrt(ax[j]^2 + ay[j]^2)
a = [
    0; 9.99972; 9.99838; 9.99724; 9.99611; 9.99499; 9.99386; 9.99273; 9.99159; 9.99046
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]
t[0] := sqrt((2*s)[0]/a[0])
v[0] := 0
t[1] := (-a[0]*t[0] + sqrt((a[0]*t[0])^2 + 2*a[1]*s[1]))/a[1]
t[2] := (-(a[1]*t[1] + a[0]*t[0]) + sqrt(((a[0]*t[0]) + (a[1]*t[1]))^2 + 2*a[1]*s[1]))/a[1]
k := 3 .. m
t[k] := (-sum(a[i]*t[i], i = 0 .. k - 1) + sqrt(sum(a[i]*t[i], i = 0 .. k - 1)^2 + 2*a[k - 1]*s[k - 1]))/a[k - 1]
v[j] := v[j - 1] + t[j - 1]*a[j - 1]
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t[0] := t[1]
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T[j] := sum(t[i], i = 1 .. j)
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T[m] = 11.8394
