m := 1
c := 7
u := 4
l := 1
a1 := 7
a2 := 5
L := 2
g := 9.8
b1 := 2
b2 := 1
k := -0.4
Given
c*θ''(t) == k*θ'(t) - L*((a1*θ(t) + b1*θ'(t)) - (a2*θ(t) + b2*θ'(t)))
θ(0) == 2
θ'(0) == 6
θ := Odesolve(t, 100)
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m := 1
l := 1
k := -0.7
g := 9.8
c := 5
a1 := 3
L := 1
a2 := 1
b1 := 2
b2 := 1
u2(t) := cos(5*t + 1)
Given
c*θ''(t) == k*θ'(t) + L*((a1*u1) - (a2*u2))
θ(0) == 0
θ'(0) == 3
u1 := θ(0)
u2 := -θ(0)
θ := Odesolve(t, 300)
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