i := 0 .. 50
C := 2
θ[i] := i*π/50
x[i] := C/2*(θ[i] - sin(θ[i]))
y[i] := -(C/2*(1 - cos(θ[i])))
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T := π/sqrt(g)
T = 1.0032 s/m^(1/2)
V[i] := sqrt(2*g*(-y[i]))
S[i] := 4*(1 - cos(θ[i]/2))
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Y(X) := 2/π*X
T1 := integral(sqrt(1 + (d^1/dX^1(Y(X)))^2)/sqrt(2*g*Y(X)), X = 0 .. π)
T1 = 1.18925 s/m^(1/2)
Given
y'(x) == sqrt((2 - y(x))/y(x))
y(0) == 0.001
y := Odesolve(x, 3.14)
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