Xmin := 0.1
Xmax := 0.9
D(t, y) := [-(2*y[0]) + y[0]*y[1] + y[0]^2 + y[1]^2 - 1; -(2*y[1]) - y[1]^2]
v[0] := 2.142
load(Xmin, v) := [0; v[0]]
score(Xmax, y) := y[0] - 0
S := sbval(v, Xmin, Xmax, D, load, score)
S = [2.66182]
n := 500
i := 0 .. n
y := [1; S[0]]
Z := rkfixed(y, Xmin, Xmax, n, D)
Z =  # no stored result
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integral((sin(t) + 2*cos(t))/(2 + cos(t)), t = 0 .. 2*π) = -1.94402
