F(t, x) := [x[0]*x[1] + 2*x[1] + x[0]^2 + x[1]^2 - 1; -x[0]^2 - 2*x[0]]
V1 := [0; 1]
V6 := [0; -1 - sqrt(2) + 0.001]
X1 := rkfixed(V1, 0, 30, 500, F)
X6 := rkfixed(V6, 0, -4.4, 500, F)
V2 := [0; -0.4]
V7 := [0; -1 - sqrt(2) + 0.001]
X2 := rkfixed(V2, 0, 25, 500, F)
X7 := rkfixed(V7, -10, 70, 500, F)
V3 := [1.2; 0]
V8 := [-0.75; -2.7]
X3 := rkfixed(V3, 0, 30, 500, F)
X8 := rkfixed(V8, -10, 10, 500, F)
V4 := [0; 0.46]
V9 := [0.01; -2.42]
X4 := rkfixed(V4, 0, 30, 500, F)
X9 := rkfixed(V9, 0, 3.6, 500, F)
V5 := [-2.5; -2.5]
V10 := [1; -3]
X5 := rkfixed(V5, -15, 50, 500, F)
X10 := rkfixed(V10, 0, -2.45, 500, F)
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μ := 0
F(t, x) := [x[0]*x[1] + μ*x[1] + x[0]^2 + x[1]^2 - 1; -x[0]^2 - μ*x[0]]
V1 := [0; 1]
X1 := rkfixed(V1, 0, 30, 500, F)
V2 := [0; -0.4]
X2 := rkfixed(V2, 0, 20, 500, F)
V3 := [0.5; 0]
X3 := rkfixed(V3, 0, 20, 500, F)
V4 := [0; 0.46]
X4 := rkfixed(V4, 0, 30, 500, F)
V5 := [-1; 0.5]
X5 := rkfixed(V5, 0, 40, 500, F)
V6 := [0; -1/2 + sqrt(5/4) + 0.001]
X6 := rkfixed(V6, 0, -40, 500, F)
V7 := [0; 0.001]
X7 := rkfixed(V7, 0, 200, 500, F)
V8 := [-0.7; -2.3]
X8 := rkfixed(V8, 0, 1, 500, F)
V9 := [0.51; -1]
X9 := rkfixed(V9, -0.2, 2.9, 500, F)
V10 := [1; -3]
X10 := rkfixed(V10, 0, -2, 500, F)  # error: Эту функцию здесь использовать нельзя.
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