F(t, x) := [x[0]*x[1] + 2*x[1] + x[0]^2 + x[1]^2 - 1; -x[0]^2 - 2*x[0]]
V1 := [0; 1]
X1 := rkfixed(V1, 0, 20, 500, F)
V2 := [0; -0.4]
X2 := rkfixed(V2, 0, 10, 500, F)
V3 := [1.2; 0]
X3 := rkfixed(V3, 0, 10, 500, F)
V4 := [0; 0.46]
X4 := rkfixed(V4, 0, 20, 500, F)
V5 := [-2.5; -2.5]
X5 := rkfixed(V5, 0, 40, 500, F)
V6 := [0; -1 - sqrt(2) + 0.001]
X6 := rkfixed(V6, 0, -4, 500, F)
V7 := [0; -1 - sqrt(2) + 0.001]
X7 := rkfixed(V7, 0, 20, 500, F)
V8 := [-0.75; -2.7]
X8 := rkfixed(V8, 0, 1, 500, F)
V9 := [0.01; -2.42]
X9 := rkfixed(V9, 0, 2.7, 500, F)
V10 := [1; -3]
X10 := rkfixed(V10, 0, -2, 500, F)
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