# Решение дифференциального уравнения
Given
d^2/dt^2(y(t)) == -2*d/dt(y(t)) + (-0.5*y(t)) + 0*t^3  # - дифференциальное уравнение
y(0) == 1
y'(0) == 1  # - начальные условия
y := Odesolve(t, 50)
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y(0) = 1
y(2) = 1.0355
a := 0.5
b := 0.2
Given
a^2*y''(t) + b*y'(t) + y(t) == 0  # - дифференциальное уравнение
y(0) == 1
y'(0) == 0  # - начальные условия
y := Odesolve(t, 40)
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y(0) = 1
y(2) = -0.384522
C := 0.5
D := 1
r := 0.05
Given
x'(t) == r*x(t)*y(t) - D*x(t)
y'(t) == C*y(t) - r*x(t)*y(t)
x(0) == 8
y(0) == 10  # - начальные условия
[x; y] := Odesolve([x; y], t, 50)
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y(0) = 10
y(2) = 15.9642
