ω := 0.5
β := -0.2
y0 := [1; 0]
M := 50
D(t, y) := [y[1]; -ω*y[0] - β*y[1]]
u := rkfixed(y0, 0, 40, M, D)
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C := 0.1
D := 1
r := 0.1
F(t, y) := [C*y[0] - r*y[0]*y[1]; -D*y[1] + r*y[0]*y[1]]
M := 500
t[0] := 0
t[1] := 100
D := rkfixed([10; 8], t[0], t[1], M, F)
G := rkfixed([10; 4], t[0], t[1], M, F)
p := rkfixed([10; 1.5], t[0], t[1], M, F)
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D =  # no stored result
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C := 0.9
D := 1
r := 0.1
F(t, y) := [C*y[0] - r*y[0]*y[1]; -D*y[1] + r*y[0]*y[1]]
M := 500
t[0] := 0
t[1] := 100
D := rkfixed([10; 12], t[0], t[1], M, F)
G := rkfixed([10; 4], t[0], t[1], M, F)
p := rkfixed([10; 1.5], t[0], t[1], M, F)
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C := 0.1
D := 1
r := 0.9
F(t, y) := [C*y[0] - r*y[0]*y[1]; -D*y[1] + r*y[0]*y[1]]
M := 500
t[0] := 0
t[1] := 100
D := rkfixed([10; 8], t[0], t[1], M, F)
G := rkfixed([10; 4], t[0], t[1], M, F)
p := rkfixed([10; 1.5], t[0], t[1], M, F)
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