m := 1
c := 4
u := 4
l := 1
a1 := 40
a2 := 10
L := 2
g := 9.8
b1 := 2
b2 := 1
k := -0.4
Given
c*θ''(t) == k*θ'(t) - L*((a1*θ(t) + b1*θ'(t)) - (a2*θ(t) + b2*θ'(t)))
θ(0) == 2
θ'(0) == 6
θ := Odesolve(t, 100)
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