ORIGIN := 1
μ := 0.035
y0 := [0; 0.5]
Y0 := [0; 0.25]
F(t, y) := [y[2]; 2*μ*(1 - y[1]^2)*y[2] - y[1]]
Z1 := rkfixed(y0, 0, 70, 2001, F)
Z2 := rkfixed(Y0, 0, 100, 2001, F)
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Z1 =  # no stored result
μ := 0.1
y0 := [0; 0.5]
Y0 := [0; 0.25]
F(t, y) := [y[2]; 2*μ*(1 - y[1]^2)*y[2] - y[1]]
Z1 := rkfixed(y0, 0, 70, 2001, F)
Z2 := rkfixed(Y0, 0, 100, 2001, F)
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μ := 0.0005
y0 := [6; 100]
Y0 := [5; 100]
F(t, y) := [y[2]; 2*μ*(1 - y[1]^2)*y[2] - y[1]]
Z1 := rkfixed(y0, 0, 70, 2001, F)
Z2 := rkfixed(Y0, 0, 100, 2001, F)
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μ := 1
y0 := [1; 10]
Y0 := [0.5; 5]
F(t, y) := [y[2]; 2*μ*(1 - y[1]^2)*y[2] - y[1]]
Z1 := rkfixed(y0, 0, 70, 2001, F)
Z2 := rkfixed(Y0, 0, 100, 2001, F)
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