B := 3
ω := π^3
μ := 0.5
Given
X'(t) == Y(t)
Y'(t) == 2*μ*(1 - X(t)^2)*Y(t) - X(t) + B*sin(Z(t))
Z'(t) == ω
X(0) == 0
Y(0) == 0.5
Z(0) == 0
[X; Y; Z] := Odesolve([X; Y; Z], t, 50)
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i := 0 .. 5000
dt := 50/5000
X1[i] := X(i*dt)
Y1[i] := Y(i*dt)
Z1[i] := Z(i*dt)
# [component: inputs (Z1, Y1, X1)]
