ν := 1
g := 1
Given
x'(t) == y(t)*(x(t) + 2)*ν + g*(x(t)^2 + y(t)^2 - 1)
y'(t) == -x(t)*(x(t) + 2)*ν
x(0) == 1 + 0.4
y(0) == 0.01
[x; y] := Odesolve([x; y], t, 200)
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i := 0 .. 5000
dt := 50/5000
X1[i] := x(i*dt)
Y1[i] := y(i*dt)
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Given
x'(t) == y(t)*(x(t) + 2)*ν + g*(x(t)^2 + y(t)^2 - 1)
y'(t) == -x(t)*(x(t) + 2)*ν
x(0) == 0
y(0) == 0.412
[x; y] := Odesolve([x; y], t, 200)
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i := 0 .. 5000
dt := 50/5000
X1[i] := x(i*dt)
Y1[i] := y(i*dt)
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