ORIGIN := 1
f(x, y) := [y[2]*(y[1] + 2) + y[1]^2 + y[2]^2 - 1; -y[1]*(y[1] + 2)]
sqrt(2) = 1.41421
Y0 := [0, 0.01, 0, 0, 2, 4; 0.414, 2.5, 2.413, 2.415, 2, 6]
Y1 := rkfixed(Y0[:, 1], -100, 100, 2000, f)
Y2 := rkfixed(Y0[:, 2], 0, 100, 2000, f)  # error: Эту функцию здесь использовать нельзя.
Y3 := rkfixed(Y0[:, 3], 0, 100, 2000, f)  # error: Эту функцию здесь использовать нельзя.
Y4 := rkfixed(Y0[:, 4], 0, 100, 2000, f)  # error: Эту функцию здесь использовать нельзя.
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