a := 0.5
g := 0.2
c := 15
b := 0.1
Given
x'(t) == -y(t) - z(t)
y'(t) == x(t) + 2*b*y(t)
z'(t) == g + a*z(t)*(x(t) - c)
x(0) == 2
y(0) == 1
z(0) == 1
[x; y; z] := Odesolve([x; y; z], t, 250)
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i := 0 .. 5000
dt := 50/5000
X1[i] := x(i*dt)
Y1[i] := y(i*dt)
Z1[i] := z(i*dt)
# [component: inputs (Z1, Y1, X1)]
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β := 8/3
σ := 5
η := 30
Given
x'(t) == σ*(y(t) - x(t))
y'(t) == η*x(t) - y(t) - x(t)*z(t)
z'(t) == -β*z(t) + x(t)*y(t)
x(0) == 4
y(0) == 3
z(0) == 2
[x; y; z] := Odesolve([x; y; z], t, 250)
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i := 0 .. 5000
dt := 50/5000
X1[i] := x(i*dt)
Y1[i] := y(i*dt)
Z1[i] := z(i*dt)
# [component: inputs (Z1, Y1, X1)]
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