m := 9
b := 0.5
r := 2
J := 1
n := 0.5
g := 9.8134782
F := 1
b*J/m*1/(2*n)*sqrt(g*r/F^3) = 0.246124
Given
φ'(t) == ψ(t)
ψ'(t) == n^2*ω(t)^2*sin(φ(t))*cos(φ(t)) - g*sin(φ(t)) - b*φ'(t)/m
ω'(t) == (r*cos(φ(t)) - F)/J
φ(0) == 0
ψ(0) == 1
ω(0) == 1
[φ; ψ; ω] := Odesolve([φ; ψ; ω], t, 250)
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i := 0 .. 5000
dt := 50/5000
X1[i] := φ(i*dt)
Y1[i] := ψ(i*dt)
Z1[i] := ω(i*dt)
# [component: inputs (Z1, Y1, X1)]
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