g(t) := cos(5*t^2)
g(t) := 18*t + 9
f(t) := 0.015
Given
x'(t) == y(t)
y'(t) == -f(x(t))*y(t) - g(x(t))
x(0) == 0
y(0) == 0
[x; y] := Odesolve([x; y], t, 150)
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a := -0.01
b := 0.6
Given
x'(t) == y(t)
y'(t) == -a*y(t) - b
x(0) == -1
y(0) == 1
[x; y] := Odesolve([x; y], t, 1500)
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