x[0] := 1000
n := 0 .. 10
x[n + 1] := 500*2^(-n) + x[n]
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x = [1000; 1500; 1750; 1875; 1937.5; 1968.75; 1984.38; 1992.19; 1996.09; 1998.05; 1999.02; 1999.51]
170! = 7.25742e306
x[0] := 10
x[n + 1] := 2*x[n] - 9
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x = [10; 11; 13; 17; 25; 41; 73; 137; 265; 521; 1033; 2057]
x[0] := 0
x[n + 1] := 100 + 1.5*x[n]
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x = [0; 100; 250; 475; 812.5; 1318.75; 2078.12; 3217.19; 4925.78; 7488.67; 11333; 17099.5]
# Логистическая модель
τ := 2
t := 0 .. 40
a := 3.8
N[0] := 0.3
N[t + 1] := a*N[t]*(1 - N[t])
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n := 0 .. 1000
b := 0.9
a := -1.0
N[0] := 10
N[1] := 0
N[n + 2] := a*N[n] + b*N[n + 1]
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Z[n, 1] := N[n]
Z[n, 2] := N[n + 1]
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Z[n, 3] := N[n + 2]
# [component: inputs Z]
# [component: inputs Z]
# [component: inputs Z]
