# 1. Зависимость решения логистического дифференциального уравнения от начальных условий
r := 1.8
V0 := [1.5; 1.15; 1; 0.8; 0.376; 0.1]
t := 0, 0.01 .. 10
i := 0 .. 5
X(i, t) := 1/(1 + ((1 - V0[i])/V0[i])*e^(-r*t))
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# Монотонный характер для любого t0.
# Ассимптотическая устойчивость для t0=1.
# 2. Дискретизация дифференциального уравнения.
# Сравнение решений дифференциального и разностного уравнения.
n := 0 .. 10
R := 1.8
x[0] := 0.1
x[n + 1] := (R + 1)*x[n] - R*x[n]^2
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# При R=1.8 решение приближает непрерывную кривую
# решение которое мы получаем зависит не только от аргумента, но и еще от начального условия и от параметра R и его значения, чем больше R тем быстрее мы будем выходить на ассимптоту
n := 0 .. 50
t := 0, 0.01 .. 50
R := 2.3
x[0] := 0.1
x[n + 1] := (R + 1)*x[n] - R*x[n]^2
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# Периодическое движение, относительно двух повторяющихся точек
# Колебания
# Двукратный цикл
# 3. Диаграмма Кёнигса - Ламерея.
a := 1.1817
b := 0.68787
F(y) := (R + 1)*y - R*y^2
y := 0, 0.001 .. (R + 1)/R
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# Увеличивая R
# получим
n := 0 .. 50
t := 0, 0.01 .. 50
R := 2.45
x[0] := 0.1
x[n + 1] := (R + 1)*x[n] - R*x[n]^2
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n := 0 .. 50
t := 0, 0.01 .. 50
R := 2.55
x[0] := 0.1
x[n + 1] := (R + 1)*x[n] - R*x[n]^2
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n := 0 .. 50
t := 0, 0.01 .. 50
R := 2.56
x[0] := 0.1
x[n + 1] := (R + 1)*x[n] - R*x[n]^2
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n := 0 .. 50
t := 0, 0.01 .. 50
R := 2.56994572
x[0] := 0.1
x[n + 1] := (R + 1)*x[n] - R*x[n]^2
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n := 0 .. 50
t := 0, 0.01 .. 50
R := sqrt(8)
x[0] := 0.1
x[n + 1] := (R + 1)*x[n] - R*x[n]^2
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# Изменение одного единственного параметра изменяет вид качественного решения уравнения, приводящий к нестандартным решениям, которых в принципе быть не должно в данной модели.
# 4. Сверхчувствительность решения к изменению начальных условий
X0[0] := 0.1
r0 := sqrt(8) + 1.1
n := 0 .. 50
X1[0] := 0.1001
X0[n + 1] := r0*X0[n]*(1 - X0[n])
r1 := r0
X1[n + 1] := r1*X1[n]*(1 - X1[n])
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# Это уравнение из-за расхождения в решении при разных n является сверхчувствительным к начальным условиям. Незначительно изменяя Н.У., решения уравнений очень быстро расходятся
